# SPIN 3 000 000
# w WF wo SEXT, D0_S7_CN
# Longitudinal injection (0 deg)
# spin tune 9*10^-8
# [component: outputs TRPSPI]
j_1 := 2
j_2 := j_1 + 33
k_1 := 3
k_2 := k_1 + 33
l_1 := 4
l_2 := l_1 + 33
rows(TRPSPI) = 165032
cols(TRPSPI) = 5
i := 0 .. rows(TRPSPI) - 1
j := j_1, j_2 .. 33*5001
k := k_1, k_2 .. 33*5001
l := l_1, l_2 .. 33*5001
SPI_iter[i] := TRPSPI[i, 0]
SPI_ray[i] := TRPSPI[i, 1]
N := (3*10^6)/600 = 5000
SX[i] := TRPSPI[i, 2]
SY[i] := TRPSPI[i, 3]
SZ[i] := TRPSPI[i, 4]
r := 0, 1 .. N
a := 1
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P_z(a) := sum(SZ[n], n = 32*(a - 1) + (a - 1) .. 32*a + (a - 1))/31
P_y(a) := sum(SY[n], n = 33*(a - 1) .. 33*a - 1)/31
P_x(a) := sum(SX[n], n = 32*(a - 1) + (a - 1) .. 32*a + (a - 1))/31
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P_y(1) = 0
P_y(5*10^3) - P_y(2) = 0
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P_y(2) = 0
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P_y0 := sum(SY[n], n = 32*(a - 1) + (a - 1) .. 32*a + (a - 1))/31 = 0
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# SPIN 3 000 000
# w WF wo SEXT, D45_S7_CN
# 45 deg injection
# spin tune 9*10^-8
# [component: outputs TRPSPI]
j_1 := 1
j_2 := j_1 + 33
k_1 := 2
k_2 := k_1 + 33
l_1 := 4
l_2 := l_1 + 33
rows(TRPSPI) =  # error: Эта переменная не определена.
cols(TRPSPI) =  # error
i := 0 .. rows(TRPSPI) - 1
j := j_1, j_2 .. 33*5001
k := k_1, k_2 .. 33*5001
l := l_1, l_2 .. 33*5001
SPI_iter[i] := TRPSPI[i, 0]
SPI_ray[i] := TRPSPI[i, 1]
SX[i] := TRPSPI[i, 2]
SY[i] := TRPSPI[i, 3]
SZ[i] := TRPSPI[i, 4]
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N := (3*10^6)/600 = 5000
r := 0, 1 .. N
a := 1
P_y0 := sum(SY[n], n = 32*(a - 1) + (a - 1) .. 32*a + (a - 1))/31
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P_y(a) := sum(SY[n], n = 33*(a - 1) .. 33*a - 1)/31
P_x(a) := sum(SX[n], n = 32*(a - 1) + (a - 1) .. 32*a + (a - 1))/31
P_z(a) := sum(SZ[n], n = 32*(a - 1) + (a - 1) .. 32*a + (a - 1))/31
P_y(1) =  # error
P_y(5*10^3) - P_y(2) =  # error
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P_y(2) =  # error
# SPIN 3 000 000
# w WF w SEXT, D45_S7_CS
# 45 deg injection
# spin tune 9*10^-8
# [component: outputs TRPSPI]
j_1 := 1
j_2 := j_1 + 33
k_1 := 2
k_2 := k_1 + 33
l_1 := 4
l_2 := l_1 + 33
rows(TRPSPI) =  # error
cols(TRPSPI) =  # error
i := 0 .. rows(TRPSPI) - 1
j := j_1, j_2 .. 33*5001
k := k_1, k_2 .. 33*5001
l := l_1, l_2 .. 33*5001
SPI_iter[i] := TRPSPI[i, 0]
SPI_ray[i] := TRPSPI[i, 1]
SX[i] := TRPSPI[i, 2]
SY[i] := TRPSPI[i, 3]
SZ[i] := TRPSPI[i, 4]
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N := (3*10^6)/600 = 5000
r := 0, 1 .. N
a := 1
P_y0 := sum(SY[n], n = 32*(a - 1) + (a - 1) .. 32*a + (a - 1))/31
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P_y(a) := sum(SY[n], n = 33*(a - 1) .. 33*a - 1)/31
P_x(a) := sum(SX[n], n = 32*(a - 1) + (a - 1) .. 32*a + (a - 1))/31
P_z(a) := sum(SZ[n], n = 32*(a - 1) + (a - 1) .. 32*a + (a - 1))/31
P_y(1) =  # error
P_y(5*10^3) - P_y(2) =  # error
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P_y(2) =  # error
# SPIN 3 000 000
# w WF w SEXT, D45_S4_CS
# 45 deg injection
# spin tune 1.7*10^-4
# [component: outputs TRPSPI]
j_1 := 2
j_2 := j_1 + 33
k_1 := 3
k_2 := k_1 + 33
l_1 := 4
l_2 := l_1 + 33
rows(TRPSPI) = 165032
cols(TRPSPI) = 5
i := 0 .. rows(TRPSPI) - 1
j := j_1, j_2 .. 33*5001
k := k_1, k_2 .. 33*5001
l := l_1, l_2 .. 33*5001
SPI_iter[i] := TRPSPI[i, 0]
SPI_ray[i] := TRPSPI[i, 1]
N := (3*10^6)/600 = 5000
SX[i] := TRPSPI[i, 2]
SY[i] := TRPSPI[i, 3]
SZ[i] := TRPSPI[i, 4]
r := 0, 1 .. N
a := 1
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P_z(a) := sum(SZ[n], n = 32*(a - 1) + (a - 1) .. 32*a + (a - 1))/31
P_y(a) := sum(SY[n], n = 33*(a - 1) .. 33*a - 1)/31
P_x(a) := sum(SX[n], n = 32*(a - 1) + (a - 1) .. 32*a + (a - 1))/31
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P_y(1) = 0.707107
P_y(5*10^3) - P_y(2) = -3.12581e-6
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P_y(2) = 0.707107
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P_y0 := sum(SY[n], n = 32*(a - 1) + (a - 1) .. 32*a + (a - 1))/31 = 0.707107
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# SPIN 3 000 000
# w WF w SEXT (2 fam), D45_S7_CS
# 45 deg injection
# spin tune 9*10^-8
# [component: outputs TRPSPI]
j_1 := 2
j_2 := j_1 + 33
k_1 := 3
k_2 := k_1 + 33
l_1 := 4
l_2 := l_1 + 33
rows(TRPSPI) = 165032
cols(TRPSPI) = 5
i := 0 .. rows(TRPSPI) - 1
j := j_1, j_2 .. 33*5001
k := k_1, k_2 .. 33*5001
l := l_1, l_2 .. 33*5001
SPI_iter[i] := TRPSPI[i, 0]
SPI_ray[i] := TRPSPI[i, 1]
N := (3*10^6)/600 = 5000
SX[i] := TRPSPI[i, 2]
SY[i] := TRPSPI[i, 3]
SZ[i] := TRPSPI[i, 4]
r := 0, 1 .. N
a := 1
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P_z(a) := sum(SZ[n], n = 32*(a - 1) + (a - 1) .. 32*a + (a - 1))/31
P_y(a) := sum(SY[n], n = 33*(a - 1) .. 33*a - 1)/31
P_x(a) := sum(SX[n], n = 32*(a - 1) + (a - 1) .. 32*a + (a - 1))/31
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P_y(1) = 0.707107
P_y(5*10^3) - P_y(2) = -3.1129e-6
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P_y(2) = 0.707107
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P_y0 := sum(SY[n], n = 32*(a - 1) + (a - 1) .. 32*a + (a - 1))/31 = 0.707107
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# 3 sex fam
# SPIN 3 000 000
# w WF w SEXT, D45_S7_CS
# 45 deg injection
# spin tune 9*10^-8
# [component: outputs TRPSPI]
j_1 := 2
j_2 := j_1 + 33
k_1 := 3
k_2 := k_1 + 33
l_1 := 4
l_2 := l_1 + 33
rows(TRPSPI) = 6170
cols(TRPSPI) = 5
i := 0 .. rows(TRPSPI) - 1
j := j_1, j_2 .. 33*5001
k := k_1, k_2 .. 33*5001
l := l_1, l_2 .. 33*5001
SPI_iter[i] := TRPSPI[i, 0]
SPI_ray[i] := TRPSPI[i, 1]
SX[i] := TRPSPI[i, 2]
SY[i] := TRPSPI[i, 3]
SZ[i] := TRPSPI[i, 4]
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N := (3*10^6)/600 = 5000
r := 0, 1 .. N
a := 1
P_y0 := sum(SY[n], n = 32*(a - 1) + (a - 1) .. 32*a + (a - 1))/31 = 0.707107
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P_y(a) := sum(SY[n], n = 33*(a - 1) .. 33*a - 1)/31
P_x(a) := sum(SX[n], n = 32*(a - 1) + (a - 1) .. 32*a + (a - 1))/31
P_z(a) := sum(SZ[n], n = 32*(a - 1) + (a - 1) .. 32*a + (a - 1))/31
P_y(1) = 0.707107
P_y(5*10^3) - P_y(2) = -3.12903e-6
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P_y(2) = 0.707107
# 3 sex fam
# SPIN 3 000 000
# w WF w SEXT, D45_S7_CS
# 45 deg injection
# spin tune 1.7*10^-4
# [component: outputs TRPSPI]
j_1 := 1
j_2 := j_1 + 33
k_1 := 2
k_2 := k_1 + 33
l_1 := 3
l_2 := l_1 + 33
rows(TRPSPI) = 4850
cols(TRPSPI) = 5
i := 0 .. rows(TRPSPI) - 1
j := j_1, j_2 .. 33*5001
k := k_1, k_2 .. 33*5001
l := l_1, l_2 .. 33*5001
SPI_iter[i] := TRPSPI[i, 0]
SPI_ray[i] := TRPSPI[i, 1]
SX[i] := TRPSPI[i, 2]
SY[i] := TRPSPI[i, 3]
SZ[i] := TRPSPI[i, 4]
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N := (3*10^6)/600 = 5000
r := 0, 1 .. N
a := 1
P_y0 := sum(SY[n], n = 32*(a - 1) + (a - 1) .. 32*a + (a - 1))/31 = 0.707107
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P_y(a) := sum(SY[n], n = 33*(a - 1) .. 33*a - 1)/31
P_x(a) := sum(SX[n], n = 32*(a - 1) + (a - 1) .. 32*a + (a - 1))/31
P_z(a) := sum(SZ[n], n = 32*(a - 1) + (a - 1) .. 32*a + (a - 1))/31
P_y(1) = 0.707107
P_y(5*10^3) - P_y(2) = -3.11613e-6
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P_y(2) = 0.707107
