# ALPHA CORRECTION
γ := 1.12792344429
β := sqrt(1 - 1/γ^2) = 0.462566
α_0 := 0.02
α_1 := -0.0148398664165
η_0 := α_0 - 1/γ^2 = -0.766033
η_1 := α_1 + 3/2*β^2/γ^2 - α_0/γ^2 + 1/γ^4 = 0.839565
3/2*β^2/γ^2 = 0.252278
α_0/γ^2 = 0.0157207
1/γ^4 = 0.617848
α_1exp := 3/2*β^2/γ^2 - α_0/γ^2 + 1/γ^4 = 0.854405
α_1exp - α_1 = 0.869245
# SEXTUPOLES
# 2 famalies
Bρ := 3.26  # T*m
L_sext := 0.3  # m
Aper := 0.05  # m
SF_mad1 := 0.9474591805  # m^-3
MSF_mad1 := SF_mad1*L_sext = 0.284238  # Multupole
SD_mad1 := -1.915403965  # m^-3
MSD_mad1 := SD_mad1*L_sext = -0.574621
SD_mad1/SF_mad1 = -2.02162
SF_mad1*L_sext = 0.284238  # m^-2
SF_cosy1 := SF_mad1*Bρ*Aper^2 = 0.00772179  # T
SD_mad1*L_sext = -0.574621  # m^-2
SF_mad1*Bρ = 3.08872  # T/m^2
L_mult := 10^-6  # m
SF_mad2 := 0.0475358  # m^-2
SD_mad2 := -0.0124713  # m^-2
SD_mad2/SF_mad2 = -0.262356
SF_mad2/L_mult*Bρ = 154967  # T/m^2
SF_cosy2 := SF_mad2/L_mult*Bρ*Aper^2 = 387.417  # T
SD_mad2/L_mult*Bρ = -40656.4  # T/m^2
SD_cosy2 := SD_mad2/L_mult*Bρ*Aper^2 = -101.641  # T
SF_mad2/L_sext*Bρ = 0.516556
SF_mad2/L_sext = 0.158453  # m^-3
SD_mad2/L_sext*Bρ = -0.135521
SD_mad2/L_sext = -0.041571  # m^-3
# Convertor of SEXTUPOLES between MADX and COSY
# 3 famalies
Bρ = 3.26
SEXT_madx(SEXT_cosy) := SEXT_cosy/(Bρ*Aper^2*1/2)
# COSY optimization
SEX_cosy(SEX_madx) := SEX_madx*Bρ*Aper^2*1/2
Aper = 0.05
# spin chromaticity correct
MULT_madx(SEXT_cosy) := SEXT_cosy*L_sext/(Bρ*Aper^2*1/2)
# {SGx1 :=  -.3034170015006776E-003;
# SGx2 :=  0.2979057586599797E-002;
# SGy  :=  -.3559473355311929E-003;}
SEXT_cosy(MULT_madx) := (MULT_madx*Bρ*Aper^2*1/2)/L_sext
SG_x1_spin := -0.000303417001501
SG_x1_spin = -0.000303417
SEXT_madx(SG_x1_spin) = -0.0744582
SEX_cosy(-0.839213) = -0.00341979
SG_x2_spin := 0.0029790575866
SG_x2_spin = 0.00297906
SEXT_madx(SG_x2_spin) = 0.731057
SG_y_spin := -0.000355947335531
SG_y_spin = -0.000355947
SEXT_madx(SG_y_spin) = -0.087349
SEX_cosy(0.382632) = 0.00155923
SEX_cosy(-1.916) = -0.0078077
# betatron chromaticities correct
# {SGx1 :=  0.7023361485251551E-002;
# SGx2 :=  0.6825664185133520E-003;
# SGy  :=  -.7834917320023617E-002;}
SEXT_madx(5*10^-3)*L_sext = 0.368098
SEXT_madx(-9.6*10^-3)*L_sext = -0.706748
SG_x1_beta := 0.0039752884475
SG_x1_beta = 0.00397529
SEXT_madx(SG_x1_beta) = 0.975531
SG_x2_beta := 0.00388568615094
SG_x2_beta = 0.00388569
SEXT_madx(SG_x2_beta) = 0.953543
SG_y_beta := -0.00786004678934
SG_x1_beta = 0.00397529
SEXT_madx(SG_y_beta) = -1.92885  # Beta Chrom MADX <-> COSY  # Spin Coh MADX <-> COSY 2D
# Spin Coh MADX <-> COSY 3D
MULT_madx(0.000892931790809) = 0.0657373
MULT_madx(0.00523043079271) = 0.385062
MULT_madx(0.00151179404108) = 0.111298
MULT_madx(0.000500685456907) = 0.0368603
MULT_madx(-0.0111541438439) = -0.821164
MULT_madx(-0.00116429402076) = -0.0857149
SEXT_cosy(0.382632) = 0.00519742
MULT_madx(0.0107981155783) = 0.794953
SEXT_madx(0.0107981155783) = 2.64984
SEXT_cosy(-0.839213) = -0.0113993
MULT_madx(0.0789820015713) = 5.81463
SEXT_madx(0.0789820015713) = 19.3821
MULT_madx(0.0199230760769) = 1.46673
SEXT_madx(0.0199230760769) = 4.8891
MULT_madx(0.424906027997) = 31.2814
SEXT_madx(0.424906027997) = 104.271
# SPIN TUNE
# [component: outputs NU]
# [component: outputs NU1]
# [component: outputs NU2]
# [component: outputs NU3]
# [component: outputs NU4]
rows(NU) = 85
cols(NU) = 9
rows(NU1) = 84
cols(NU1) = 9
rows(NU2) = 85
cols(NU2) = 9
rows(NU3) = 83
cols(NU3) = 9
rows(NU4) = 84
cols(NU4) = 9
i := 0 .. rows(NU) - 1
j := 0 .. rows(NU1) - 1
num[i] := NU[i, 0]
A[i] := NU[i, 1]
ord[i] := NU[i, 2]
k := 0 .. rows(NU2) - 1
num1[j] := NU1[j, 0]
B[j] := NU1[j, 1]
ord1[j] := NU1[j, 2]
t := 0 .. rows(NU3) - 1
num2[k] := NU2[k, 0]
C[k] := NU2[k, 1]
ord2[k] := NU2[k, 2]
q := 0 .. rows(NU4) - 1
a_1[i] := NU[i, 3]
a_2[i] := NU[i, 4]
a_3[i] := NU[i, 5]
a_4[i] := NU[i, 6]
a_5[i] := NU[i, 7]
a_6[i] := NU[i, 8]
num3[t] := NU3[t, 0]
D[t] := NU3[t, 1]
ord3[t] := NU3[t, 2]
b_1[j] := NU1[j, 3]
b_2[j] := NU1[j, 4]
b_3[j] := NU1[j, 5]
b_4[j] := NU1[j, 6]
b_5[j] := NU1[j, 7]
b_6[j] := NU1[j, 8]
num4[q] := NU4[q, 0]
E[q] := NU4[q, 1]
ord4[q] := NU4[q, 2]
# spin-tune:
c_1[k] := NU2[k, 3]
c_2[k] := NU2[k, 4]
c_3[k] := NU2[k, 5]
c_4[k] := NU2[k, 6]
c_5[k] := NU2[k, 7]
c_6[k] := NU2[k, 8]
d_1[t] := NU3[t, 3]
d_2[t] := NU3[t, 4]
d_3[t] := NU3[t, 5]
d_4[t] := NU3[t, 6]
d_5[t] := NU3[t, 7]
d_6[t] := NU3[t, 8]
ν_s := A[0] = 0.000176478
# spin-tune:
ν_s := B[0] = 0.000176478
e_1[q] := NU4[q, 3]
e_2[q] := NU4[q, 4]
e_3[q] := NU4[q, 5]
e_4[q] := NU4[q, 6]
e_5[q] := NU4[q, 7]
e_6[q] := NU4[q, 8]
# spin-tune:
ν_s := C[0] = 0.000176478
# spin-tune:
ν_s := D[0] = 0.000176478
# spin-tune:
ν_s := E[0] = 0.000176478
ν(α_1, α_2, α_3, α_4, α_5, α_6) := sum((A[i]*α_1^a_1[i]*α_2^a_2[i]*α_3^a_3[i]*α_4^a_4[i]*α_5^a_5[i]*α_6^a_6[i]), i = 1 .. rows(NU) - 1)
ν_1(α_1, α_2, α_3, α_4, α_5, α_6) := sum((B[j]*α_1^b_1[j]*α_2^b_2[j]*α_3^b_3[j]*α_4^b_4[j]*α_5^b_5[j]*α_6^b_6[j]), j = 1 .. rows(NU1) - 1)
ν_2(α_1, α_2, α_3, α_4, α_5, α_6) := sum((C[k]*α_1^c_1[k]*α_2^c_2[k]*α_3^c_3[k]*α_4^c_4[k]*α_5^c_5[k]*α_6^c_6[k]), k = 1 .. rows(NU2) - 1)
ν_3(α_1, α_2, α_3, α_4, α_5, α_6) := sum((D[t]*α_1^d_1[t]*α_2^d_2[t]*α_3^d_3[t]*α_4^d_4[t]*α_5^d_5[t]*α_6^d_6[t]), t = 1 .. rows(NU3) - 1)
ν_4(α_1, α_2, α_3, α_4, α_5, α_6) := sum((E[q]*α_1^e_1[q]*α_2^e_2[q]*α_3^e_3[q]*α_4^e_4[q]*α_5^e_5[q]*α_6^e_6[q]), q = 1 .. rows(NU4) - 1)
ν_NC(x) := ν(x, 0, 0, 0, 0, 0)
ν_BC(x) := ν_1(x, 0, 0, 0, 0, 0)
ν_SC(x) := ν_2(x, 0, 0, 0, 0, 0)
ν_BC_α(x) := ν_3(x, 0, 0, 0, 0, 0)
ν_BC_η(x) := ν_4(x, 0, 0, 0, 0, 0)
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ν_NC(y) := ν(0, 0, y, 0, 0, 0)
ν_BC(y) := ν_1(0, 0, y, 0, 0, 0)
ν_SC(y) := ν_2(0, 0, y, 0, 0, 0)
ν_BC_α(y) := ν_3(0, 0, y, 0, 0, 0)
ν_BC_η(y) := ν_4(0, 0, y, 0, 0, 0)
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ν_NC(d) := ν(0, 0, 0, 0, 0, d)
ν_BC(d) := ν_1(0, 0, 0, 0, 0, d)
ν_SC(d) := ν_2(0, 0, 0, 0, 0, d)
ν_BC_α(d) := ν_3(0, 0, 0, 0, 0, d)
ν_BC_η(d) := ν_4(0, 0, 0, 0, 0, d)
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# TUNE
# [component: outputs TUNE_x]
# [component: outputs TUNE1_x]
rows(TUNE_x) = 3
cols(TUNE_x) = 8
rows(TUNE1_x) = 3
cols(TUNE1_x) = 8
# [component: outputs TUNE_y]
# [component: outputs TUNE1_y]
rows(TUNE_y) = 3
cols(TUNE_y) = 8
rows(TUNE1_y) = 3
cols(TUNE1_y) = 8
i := 0 .. rows(TUNE_x) - 1
i := 0 .. rows(TUNE1_x) - 1
num_x[i] := TUNE_x[i, 0]
A_x[i] := TUNE_x[i, 1]
ord_x[i] := TUNE_x[i, 2]
num1_x[i] := TUNE1_x[i, 0]
B_x[i] := TUNE1_x[i, 1]
ord1_x[i] := TUNE1_x[i, 2]
b_x1[i] := TUNE1_x[i, 3]
b_x2[i] := TUNE1_x[i, 4]
b_x3[i] := TUNE1_x[i, 5]
a_x1[i] := TUNE_x[i, 3]
a_x2[i] := TUNE_x[i, 4]
a_x3[i] := TUNE_x[i, 5]
b_x4[i] := TUNE1_x[i, 6]
b_x5[i] := TUNE1_x[i, 7]
a_x4[i] := TUNE_x[i, 6]
a_x5[i] := TUNE_x[i, 7]
num_y[i] := TUNE_y[i, 0]
A_y[i] := TUNE_y[i, 1]
ord_y[i] := TUNE_y[i, 2]
num1_y[i] := TUNE1_y[i, 0]
B_y[i] := TUNE1_y[i, 1]
ord1_y[i] := TUNE1_y[i, 2]
b_y1[i] := TUNE1_y[i, 3]
b_y2[i] := TUNE1_y[i, 4]
b_y3[i] := TUNE1_y[i, 5]
a_y1[i] := TUNE_y[i, 3]
a_y2[i] := TUNE_y[i, 4]
a_y3[i] := TUNE_y[i, 5]
b_y4[i] := TUNE1_y[i, 6]
b_y5[i] := TUNE1_y[i, 7]
a_y4[i] := TUNE_y[i, 6]
a_y5[i] := TUNE_y[i, 7]
γ := 1.1279235
ν_x(α_1, α_2, α_3, α_4, α_5) := sum((A_x[i]*α_1^a_x1[i]*α_2^a_x2[i]*α_3^a_x3[i]*α_4^a_x4[i]*α_5^a_x5[i]), i = 1 .. rows(TUNE_x) - 1)
ν_x1(α_1, α_2, α_3, α_4, α_5) := sum((B_x[i]*α_1^b_x1[i]*α_2^b_x2[i]*α_3^b_x3[i]*α_4^b_x4[i]*α_5^b_x5[i]), i = 1 .. rows(TUNE1_x) - 1)
ν_y1(α_1, α_2, α_3, α_4, α_5) := sum((B_y[i]*α_1^b_y1[i]*α_2^b_y2[i]*α_3^b_y3[i]*α_4^b_y4[i]*α_5^b_y5[i]), i = 1 .. rows(TUNE1_x) - 1)
ν_y(α_1, α_2, α_3, α_4, α_5) := sum((A_y[i]*α_1^a_y1[i]*α_2^a_y2[i]*α_3^a_y3[i]*α_4^a_y4[i]*α_5^a_y5[i]), i = 1 .. rows(TUNE_x) - 1)
CHROM_x := A_x[1]*(1 + 1/γ) = -17.0317
CHROM1_x := B_x[1]*(1 + 1/γ) = -6.98498e-6
CHROM_y := A_y[1]*(1 + 1/γ) = -17.0518
CHROM1_y := B_y[1]*(1 + 1/γ) = 6.51678e-6
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# CORR_DEPANDANCE
# [component: outputs SPIN_COH]
# [component: outputs CHROM_DEP]
rows(SPIN_COH) = 21
cols(SPIN_COH) = 5
rows(CHROM_DEP) = 21
cols(CHROM_DEP) = 5
i := 0 .. rows(CHROM_DEP) - 1
i := 0 .. rows(SPIN_COH) - 1
C_SGx2[i] := CHROM_DEP[i, 0]
C_SGx1[i] := CHROM_DEP[i, 1]
C_SGy1[i] := CHROM_DEP[i, 2]
S_SGx2[i] := SPIN_COH[i, 0]
S_SGx1[i] := SPIN_COH[i, 1]
S_SGy1[i] := SPIN_COH[i, 2]
ν_x[i] := CHROM_DEP[i, 3]
k_x[i] := SPIN_COH[i, 3]
ν_y[i] := CHROM_DEP[i, 4]
k_y[i] := SPIN_COH[i, 4]
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# SPIN COHER vs BETA CHROM
# [component: outputs Param]
# [component: outputs Part]
# [component: outputs Spin]
rows(Param) = 10
cols(Param) = 8
rows(Part) = 10
cols(Part) = 5
rows(Spin) = 10
cols(Spin) = 5
i := 0 .. rows(Param) - 1
Iter[i] := Param[i, 0]
SGx1[i] := Param[i, 1]
SGy1[i] := Param[i, 2]
EB[i] := Param[i, 3]
ξ_x[i] := Param[i, 4]
ξ_y[i] := Param[i, 5]
α_0[i] := Param[i, 6]
α_1[i] := Param[i, 7]
η_1[i] := Part[i, 1]
QK_x[i] := Part[i, 2]
QK_y[i] := Part[i, 3]
QK_z[i] := Part[i, 4]
μ_0[i] := Spin[i, 1]
ν_s1[i] := Spin[i, 2]
ν_s2[i] := Spin[i, 3]
ν_s3[i] := Spin[i, 4]
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# AXION
# [component: outputs Param]
rows(Param) = 30
cols(Param) = 5
i := 0 .. rows(Param) - 1
Iter[i] := Param[i, 0]
SGx1[i] := Param[i, 1]
SGy1[i] := Param[i, 2]
EB[i] := Param[i, 3]
μ_0[i] := Param[i, 4]
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