# SPIN 3 000 000
# 5 QUAD w WF wo SEXT
# Longitudinal injection (0 deg)
# spin tune 9*10^-8
# [component: outputs TRPSPI]
j_1 := 1
j_2 := j_1 + 33
k_1 := 2
k_2 := k_1 + 33
l_1 := 3
l_2 := l_1 + 33
rows(TRPSPI) = 165032
cols(TRPSPI) = 5
i := 0 .. rows(TRPSPI) - 1
j := j_1, j_2 .. 33*5001
k := k_1, k_2 .. 33*5001
l := l_1, l_2 .. 33*5001
SPI_iter[i] := TRPSPI[i, 0]
SPI_ray[i] := TRPSPI[i, 1]
SX[i] := TRPSPI[i, 2]
SY[i] := TRPSPI[i, 3]
SZ[i] := TRPSPI[i, 4]
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N := (3*10^6)/600 = 5000
r := 0, 1 .. N
a := 1
P_y0 := sum(SY[n], n = 32*(a - 1) + (a - 1) .. 32*a + (a - 1))/31 = 0
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P_y(a) := sum(SY[n], n = 33*(a - 1) .. 33*a - 1)/31
P_x(a) := sum(SX[n], n = 32*(a - 1) + (a - 1) .. 32*a + (a - 1))/31
P_z(a) := sum(SZ[n], n = 32*(a - 1) + (a - 1) .. 32*a + (a - 1))/31
P_y(1) = 0
P_y(5*10^3) - P_y(2) = 5.46473e-22
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P_y(2) = -1.09295e-22
# SPIN 3 000 000
# 5 QUAD w WF wo SEXT
# 45 deg injection
# spin tune 9*10^-8
# [component: outputs TRPSPI]
j_1 := 1
j_2 := j_1 + 33
k_1 := 2
k_2 := k_1 + 33
l_1 := 4
l_2 := l_1 + 33
rows(TRPSPI) = 165032
cols(TRPSPI) = 5
i := 0 .. rows(TRPSPI) - 1
j := j_1, j_2 .. 33*5001
k := k_1, k_2 .. 33*5001
l := l_1, l_2 .. 33*5001
SPI_iter[i] := TRPSPI[i, 0]
SPI_ray[i] := TRPSPI[i, 1]
SX[i] := TRPSPI[i, 2]
SY[i] := TRPSPI[i, 3]
SZ[i] := TRPSPI[i, 4]
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N := (3*10^6)/600 = 5000
r := 0, 1 .. N
a := 1
P_y0 := sum(SY[n], n = 32*(a - 1) + (a - 1) .. 32*a + (a - 1))/31 = 0.707107
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P_y(a) := sum(SY[n], n = 33*(a - 1) .. 33*a - 1)/31
P_x(a) := sum(SX[n], n = 32*(a - 1) + (a - 1) .. 32*a + (a - 1))/31
P_z(a) := sum(SZ[n], n = 32*(a - 1) + (a - 1) .. 32*a + (a - 1))/31
P_y(1) = 0.707107
P_y(5*10^3) - P_y(2) = -3.15161e-6
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P_y(2) = 0.707107
# SPIN 3 000 000
# 5 QUAD w WF w SEXT
# 45 deg injection
# spin tune 9*10^-8
# [component: outputs TRPSPI]
j_1 := 1
j_2 := j_1 + 33
k_1 := 2
k_2 := k_1 + 33
l_1 := 4
l_2 := l_1 + 33
rows(TRPSPI) = 165032
cols(TRPSPI) = 5
i := 0 .. rows(TRPSPI) - 1
j := j_1, j_2 .. 33*5001
k := k_1, k_2 .. 33*5001
l := l_1, l_2 .. 33*5001
SPI_iter[i] := TRPSPI[i, 0]
SPI_ray[i] := TRPSPI[i, 1]
SX[i] := TRPSPI[i, 2]
SY[i] := TRPSPI[i, 3]
SZ[i] := TRPSPI[i, 4]
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N := (3*10^6)/600 = 5000
r := 0, 1 .. N
a := 1
P_y0 := sum(SY[n], n = 32*(a - 1) + (a - 1) .. 32*a + (a - 1))/31 = 0.707107
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P_y(a) := sum(SY[n], n = 33*(a - 1) .. 33*a - 1)/31
P_x(a) := sum(SX[n], n = 32*(a - 1) + (a - 1) .. 32*a + (a - 1))/31
P_z(a) := sum(SZ[n], n = 32*(a - 1) + (a - 1) .. 32*a + (a - 1))/31
P_y(1) = 0.707107
P_y(5*10^3) - P_y(2) = -3.09355e-6
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P_y(2) = 0.707107
# SPIN 3 000 000
# 5 QUAD w WF w SEXT
# 45 deg injection
# spin tune 1.7*10^-4
# [component: outputs TRPSPI]
j_1 := 1
j_2 := j_1 + 33
k_1 := 2
k_2 := k_1 + 33
l_1 := 4
l_2 := l_1 + 33
rows(TRPSPI) = 165032
cols(TRPSPI) = 5
i := 0 .. rows(TRPSPI) - 1
j := j_1, j_2 .. 33*5001
k := k_1, k_2 .. 33*5001
l := l_1, l_2 .. 33*5001
SPI_iter[i] := TRPSPI[i, 0]
SPI_ray[i] := TRPSPI[i, 1]
SX[i] := TRPSPI[i, 2]
SY[i] := TRPSPI[i, 3]
SZ[i] := TRPSPI[i, 4]
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N := (3*10^6)/600 = 5000
r := 0, 1 .. N
a := 1
P_y0 := sum(SY[n], n = 32*(a - 1) + (a - 1) .. 32*a + (a - 1))/31 = 0.707107
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P_y(a) := sum(SY[n], n = 33*(a - 1) .. 33*a - 1)/31
P_x(a) := sum(SX[n], n = 32*(a - 1) + (a - 1) .. 32*a + (a - 1))/31
P_z(a) := sum(SZ[n], n = 32*(a - 1) + (a - 1) .. 32*a + (a - 1))/31
P_y(1) = 0.707107
P_y(5*10^3) - P_y(2) = -3.1e-6
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P_y(2) = 0.707107
