# TWISS
# 5 quad
# [component: outputs BETAX]
# [component: outputs BETAY]
# [component: outputs DISPX]
# [component: outputs DISPY]
rows(BETAX) = 313
cols(BETAX) = 2
rows(BETAY) = 313
cols(BETAY) = 2
rows(DISPX) = 313
rows(DISPY) = 313
i := 0 .. rows(DISPX) - 1
el[i] := BETAX[i, 1]
β_x[i] := BETAX[i, 0]
β_y[i] := BETAY[i, 0]
D_x[i] := DISPX[i, 0]
D_y[i] := DISPY[i, 0]
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# TWISS
# 5 quad
# w WF
# [component: outputs BETAX]
# [component: outputs BETAY]
# [component: outputs DISPX]
# [component: outputs DISPY]
rows(BETAX) = 325
cols(BETAX) = 2
rows(BETAY) = 313
cols(BETAY) = 2
rows(DISPX) = 325
rows(DISPY) = 313
i := 0 .. rows(DISPX) - 1
el[i] := BETAX[i, 1]
β_x[i] := BETAX[i, 0]
β_y[i] := BETAY[i, 0]  # error: Индекс массива является недопустимым для этого массива.
D_x[i] := DISPX[i, 0]
D_y[i] := DISPY[i, 0]  # error: Индекс массива является недопустимым для этого массива.
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# TWISS
# 3 quad
# [component: outputs BETAX]
# [component: outputs BETAY]
# [component: outputs DISPX]
# [component: outputs DISPY]
rows(BETAX) = 313
cols(BETAX) = 2
rows(BETAY) = 313
cols(BETAY) = 2
rows(DISPX) = 313
rows(DISPY) = 313
i := 0 .. rows(DISPX) - 1
el[i] := BETAX[i, 1]
β_x[i] := BETAX[i, 0]
β_y[i] := BETAY[i, 0]
D_x[i] := DISPX[i, 0]
D_y[i] := DISPY[i, 0]
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