# 1-turn Tracking
# [component: outputs SPI_SEQ]
j_1 := 6
j_2 := j_1 + 32
rows(SPI_SEQ) = 1238402
cols(SPI_SEQ) = 6
i := 0 .. rows(SPI_SEQ) - 1
j := j_1, j_2 .. (3*10^6)/10
SSEQ_iter[i] := SPI_SEQ[i, 0]
SSEQ_eid[i] := SPI_SEQ[i, 1]
SSEQ_ray[i] := SPI_SEQ[i, 2]
SSEQ_SX[i] := SPI_SEQ[i, 3]
SSEQ_SY[i] := SPI_SEQ[i, 4]
SSEQ_SZ[i] := SPI_SEQ[i, 5]
SSEQ_iter[j] =  # no stored result
SSEQ_eid[j] =  # no stored result
SSEQ_ray[j] =  # no stored result
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# [component: outputs RAY_SEQ]
rows(RAY_SEQ) = 1238431
cols(RAY_SEQ) = 9
i := 0 .. rows(RAY_SEQ) - 1
RSEQ_iter[i] := RAY_SEQ[i, 0]
RSEQ_eid[i] := RAY_SEQ[i, 1]
RSEQ_ray[i] := RAY_SEQ[i, 2]
RSEQ_X[i] := RAY_SEQ[i, 3]
RSEQ_A[i] := RAY_SEQ[i, 4]
RSEQ_Y[i] := RAY_SEQ[i, 5]
RSEQ_B[i] := RAY_SEQ[i, 6]
RSEQ_T[i] := RAY_SEQ[i, 7]  # error: Недостаточно памяти для этой операции.
RSEQ_D[i] := RAY_SEQ[i, 8]
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