# BY PASS w dipoles
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# GEOMETRY
degtorad := π/180 = 0.0174533
α := 9  # deg
L_yBP := 100  # cm
# Total accelerator length w BYPASS
# From OptiM Geometry | NICA geometry
L_BP := L_yBP/sin(α*degtorad) = 639.245  # cm
L_total := 535.071  # in metrs
L_NICA := 503.04
L_arc := 142.15
L_arc := 142.15
# DIPOLES
L_M1 := 144.728 - L_arc = 2.578
L_NICA_ss := (L_NICA - 2*L_arc)/2 = 109.37
L_BP := 151.138 - L_arc - L_M1 = 6.41
L_yBP := L_BP*sin(α*degtorad) = 1.00274
θ_dip := 4.5  # deg
θ_BP_dip := α  # deg
L_M2 := 153.578 - L_arc - L_M1 - L_BP = 2.44
L_xBP := L_BP*cos(α*degtorad) = 6.33108
L_dip := 194  # cm
L_BP_dip := 50  # cm
L_ss := 256.108 - L_arc - L_M1 - L_BP - L_M2 = 102.53
B_dip := 1.3174924  # kG
B_BP_dip := B_dip*L_dip/L_BP_dip*θ_BP_dip/θ_dip = 10.2237  # kG
L_ss_1 := 240.25 - L_arc - L_M1 - L_BP - L_M2 = 86.672  # (wo 2 FODO in SS)
243.35
N_BP_dip := 2
L_acc := 2*(L_arc + 2*L_M1 + 2*L_BP + 2*L_M2 + L_ss) = 535.072
# QUADRUPOLES
L_acc_1 := 2*(L_arc + 2*L_M1 + 2*L_BP + 2*L_M2 + L_ss_1) = 503.356
N_BP_quad := 3
L_NA1 := (L_acc - 2*L_arc)/2 = 125.386
L_BP_quad := 47  # cm
L_NA2 := 2*(L_M1 + L_BP + L_M2) + L_ss = 125.386
G_BP_quad := 0.01  # kG/cm
L_x := 2*(L_arc + 2*L_M1 + 2*L_xBP + 2*L_M2 + L_ss) = 534.756
# DRIFTS
L_x_1 := 2*(L_arc + 2*L_M1 + 2*L_xBP + 2*L_M2 + L_ss_1) = 503.04
N_BP_drift := 4
L_drift := 100  # cm
# Total accelerator length w BYPASS (5 quad)
# From OptiM Geometry
L_total := 510.023  # in metrs
L_elem := (N_BP_dip*L_BP_dip) + N_BP_quad*L_BP_quad + N_BP_drift*L_drift = 641
L_arc := 142.15
L_M1 := 144.698 - L_arc = 2.548
δ := L_BP - (N_BP_dip*L_BP_dip) - (N_BP_quad*L_BP_quad) - (N_BP_drift*L_drift) = -634.59
L_BP := 154.048 - L_arc - L_M1 = 9.35
L_yBP := L_BP*sin(α*degtorad) = 1.46266
L_M2 := 156.596 - L_arc - L_M1 - L_BP = 2.548
L_xBP := L_BP*cos(α*degtorad) = 9.23489
L_ss := 240.566 - L_arc - L_M1 - L_BP - L_M2 = 83.97
L_acc := 2*(L_arc + 2*L_M1 + 2*L_BP + 2*L_M2 + L_ss) = 510.024
L_x := 2*(L_arc + 2*L_M1 + 2*L_xBP + 2*L_M2 + L_ss) = 509.564
L_x_ss := (2*L_M1 + 2*L_xBP + 2*L_M2 + L_ss) = 112.632
# Total accelerator length w BYPASS (3 quad)
# From OptiM Geometry
L_total := 503.463  # in metrs
L_arc := 142.15
L_M1 := 145.348 - L_arc = 3.198
L_BP := 151.758 - L_arc - L_M1 = 6.41
L_yBP := L_BP*sin(α*degtorad) = 1.00274
L_M2 := 154.956 - L_arc - L_M1 - L_BP = 3.198
L_xBP := L_BP*cos(α*degtorad) = 6.33108
L_ss := 238.926 - L_arc - L_M1 - L_BP - L_M2 = 83.97
L_acc := 2*(L_arc + 2*L_M1 + 2*L_BP + 2*L_M2 + L_ss) = 503.464
L_x := 2*(L_arc + 2*L_M1 + 2*L_xBP + 2*L_M2 + L_ss) = 503.148
L_x_ss := (2*L_M1 + 2*L_xBP + 2*L_M2 + L_ss) = 109.424
# Total accelerator length w BYPASS (real)
# From OptiM Geometry
L_total := 503.5  # in metrs
L_arc := 142.15
L_M1 := 144.698 - L_arc = 2.548
L_BP := 154.048 - L_arc - L_M1 = 9.35
L_yBP := L_BP*sin(α*degtorad) = 1.46266
L_M2 := 156.596 - L_arc - L_M1 - L_BP = 2.548
L_xBP := L_BP*cos(α*degtorad) = 9.23489
L_ss := 237.304 - L_arc - L_M1 - L_BP - L_M2 = 80.708
L_acc := 2*(L_arc + 2*L_M1 + 2*L_BP + 2*L_M2 + L_ss) = 503.5
L_x := 2*(L_arc + 2*L_M1 + 2*L_xBP + 2*L_M2 + L_ss) = 503.04
L_x_ss := (2*L_M1 + 2*L_xBP + 2*L_M2 + L_ss) = 109.37
