# Constants | Dipoles
e := 1.6*10^-19  # Кл
L_dip := 1.94  # м
c := 3*10^8  # c
N_dip := 40*2
m := 931.49  # MeV/u
# Gold | Deutrons
A_g := 197
A_d := 2
Z_g := 79
Z_d := 1
W_g := 4500  # MeV/u
W_d := 240  # MeV/u
G_g := 2.265079  # kG/cm
E_kin.g := W_g*A_g/Z_g = 11221.5
E_kin.d := W_d*A_d/Z_d = 480
(e*Z*G)/p
γ_g := (m + W_g)/m = 5.83097
γ_d := (m + W_d)/m = 1.25765
β_g := sqrt(1 - 1/γ_g^2) = 0.985184
β_d := sqrt(1 - 1/γ_d^2) = 0.606435
const := (Z_g/A_g)/(γ_g*β_g) = 0.0698076
p_0g := m*β_g*γ_g = 5351.02  # MeV/u
p_0d := m*β_d*γ_d = 710.433  # MeV/u
k := const*(γ_d*β_d)/(Z_d/A_d) = 0.106482
E_g := sqrt((m*A_g/Z_g)^2 + W_g^2) = 5064.14
E_d := sqrt((m*A_d/Z_d)^2 + W_d^2) = 1878.38
G_d := G_g*const*(γ_d*β_d)/(Z_d/A_d) = 0.241191
Br_d := A_d/Z_d*p_0d/c*10^6 = 4.73622
Br_g := A_g/Z_g*p_0g/c*10^6 = 44.4789
B_dip.g := 2*π*Br_g/(L_dip*N_dip) = 1.8007
B_dip.d := 2*π*Br_d/(L_dip*N_dip) = 0.191743
B_dip.g/B_dip.d = 9.39123
