# Constants | Dipoles
e := 1.6*10^-19  # Кл
L_dip := 1.94  # м
c := 3*10^8  # c
N_dip := 40*2
m := 931.49  # MeV/u
# Gold | Deutrons
A_g := 197
A_d := 2
Z_g := 79
Z_d := 1
W_g := 4500  # MeV/u
W_d := 120  # MeV/u
G_g := 2.265079  # kG/cm
E_kin.g := W_g*A_g/Z_g = 11221.5
E_kin.d := W_d*A_d/Z_d = 240
γ_g := (m + W_g)/m = 5.83097
γ_d := (m + W_d)/m = 1.12883  # (e*Z*G)/p
β_g := sqrt(1 - 1/γ_g^2) = 0.985184
β_d := sqrt(1 - 1/γ_d^2) = 0.463922
p_0g := m*β_g*γ_g = 5351.02  # MeV/u
p_0d := m*β_d*γ_d = 487.809  # MeV/u
const := (Z_g/A_g)/(γ_g*β_g) = 0.0698076
E_g := sqrt((m*A_g/Z_g)^2 + W_g^2) = 5064.14
E_d := sqrt((m*A_d/Z_d)^2 + W_d^2) = 1866.84
k := const*(γ_d*β_d)/(Z_d/A_d) = 0.0731146
Br_g := A_g/Z_g*p_0g/c*10^6 = 44.4789
Br_d := A_d/Z_d*p_0d/c*10^6 = 3.25206
0.073/0.106 = 0.688679
B_dip.g := 2*π*Br_g/(L_dip*N_dip) = 1.8007
B_dip.d := 2*π*Br_d/(L_dip*N_dip) = 0.131658
G_d := G_g*const*(γ_d*β_d)/(Z_d/A_d) = 0.16561
G_d/G_g = 0.0731146
# Отличие в градиентах при 240 MeV/u и 120 MeV/u
0.132/0.192 = 0.6875
B_dip.d/B_dip.g == G_quad.d/G_quad.g
B_dip.d/B_dip.g = 0.0731146
100/sin(2*π/360*18) = 323.607  # см
6.5  # м
m*A_d/Z_d = 1862.98
L_dipD := 40  # см
# WIEN FILTER
1*TL = 10000*Gs  # error: Эта переменная не определена.
E_si := 100*10^3/10^-2 = 10000000  # V/m
c_si := 3*10^8  # m/с
β := 0.46392
v_si := β*c_si = 139176000  # m/с
B_si := E_si/v_si = 0.0718515
V*с/m^2 ≡ T  # error: Здесь необходимо указать имя.
B_si*10^4 = 718.515  # Gs
B_si*10^4*10^-3 = 0.718515  # kGs
E_SGS := E_si*10^-6
c_SGS := 3*10^10  # см/с
v_SGS := c_SGS*β
B_SGS := E_SGS*c_SGS/v_SGS = 21.5554
