# SEXTUPOLES
# 2 famalies
Bρ := 3.26  # T*m
L_sext := 0.3  # m
Aper := 0.05  # m
SF_mad1 := 0.9474591805  # m^-3
MSF_mad1 := SF_mad1*L_sext = 0.284238  # Multupole
SD_mad1 := -1.915403965  # m^-3
MSD_mad1 := SD_mad1*L_sext = -0.574621
SD_mad1/SF_mad1 = -2.02162
SF_mad1*L_sext = 0.284238  # m^-2
SF_cosy1 := SF_mad1*Bρ*Aper^2 = 0.00772179  # T
SD_mad1*L_sext = -0.574621  # m^-2
SF_mad1*Bρ = 3.08872  # T/m^2
L_mult := 10^-6  # m
SF_mad2 := 0.0475358  # m^-2
SD_mad2 := -0.0124713  # m^-2
SD_mad2/SF_mad2 = -0.262356
SF_mad2/L_mult*Bρ = 154967  # T/m^2
SF_cosy2 := SF_mad2/L_mult*Bρ*Aper^2 = 387.417  # T
SD_mad2/L_mult*Bρ = -40656.4  # T/m^2
SD_cosy2 := SD_mad2/L_mult*Bρ*Aper^2 = -101.641  # T
SF_mad2/L_sext*Bρ = 0.516556
SF_mad2/L_sext = 0.158453  # m^-3
SD_mad2/L_sext*Bρ = -0.135521
SD_mad2/L_sext = -0.041571  # m^-3
# 3 famalies
# Convertor of SEXTUPOLES between MADX and COSY
# COSY optimization
# spin chromaticity correct
SEX_cosy(SEX_madx) := SEX_madx*Bρ*Aper^2*1/2
SEXT_madx(SEXT_cosy) := SEXT_cosy/(Bρ*Aper^2*1/2)
# {SGx1 :=  -.3034170015006776E-003;
# SGx2 :=  0.2979057586599797E-002;
# SGy  :=  -.3559473355311929E-003;}
SEX_cosy(1.25) = 0.00509375
SG_x1_spin := -0.000303417001501
SG_x1_spin = -0.000303417
SEXT_madx(SG_x1_spin) = -0.0744582
SEX_cosy(0.623) = 0.00253873
SG_x2_spin := 0.0029790575866
SG_x2_spin = 0.00297906
SEXT_madx(SG_x2_spin) = 0.731057
SEX_cosy(-1.916) = -0.0078077
SG_y_spin := -0.000355947335531
SG_y_spin = -0.000355947
SEXT_madx(SG_y_spin) = -0.087349
# betatron chromaticities correct
# {SGx1 :=  0.7023361485251551E-002;
# SGx2 :=  0.6825664185133520E-003;
# SGy  :=  -.7834917320023617E-002;}
SEXT_madx(5*10^-3)*L_sext = 0.368098
SEXT_madx(-9.6*10^-3)*L_sext = -0.706748
SG_x1_beta := 0.0039752884475
SG_x1_beta = 0.00397529
SEXT_madx(SG_x1_beta) = 0.975531
SG_x2_beta := 0.00388568615094
SG_x2_beta = 0.00388569
SEXT_madx(SG_x2_beta) = 0.953543
SG_y_beta := -0.00786004678934
SG_x1_beta = 0.00397529
SEXT_madx(SG_y_beta) = -1.92885
# SPIN TUNE
# [component: outputs NU1]
# [component: outputs NU]
rows(NU1) = 84
cols(NU1) = 9
rows(NU) = 85
cols(NU) = 9
i := 0 .. rows(NU) - 1
num[i] := NU[i, 0]
A[i] := NU[i, 1]
ord[i] := NU[i, 2]
a_6[i] := NU[i, 8]
a_1[i] := NU[i, 3]
a_2[i] := NU[i, 4]
a_3[i] := NU[i, 5]
a_4[i] := NU[i, 6]
a_5[i] := NU[i, 7]
i := 0 .. rows(NU1) - 1
num[i] := NU1[i, 0]
B[i] := NU1[i, 1]
ord1[i] := NU1[i, 2]
# spin-tune:
ν_s := A[0] = 0.000176478
b_1[i] := NU1[i, 3]
b_2[i] := NU1[i, 4]
b_3[i] := NU1[i, 5]
b_4[i] := NU1[i, 6]
b_5[i] := NU1[i, 7]
b_6[i] := NU1[i, 8]
# spin-tune:
ν_s := B[0] = 0.000176478
ν(α_1, α_2, α_3, α_4, α_5, α_6) := sum((A[i]*α_1^a_1[i]*α_2^a_2[i]*α_3^a_3[i]*α_4^a_4[i]*α_5^a_5[i]*α_6^a_6[i]), i = 1 .. rows(NU) - 1)
ν_1(α_1, α_2, α_3, α_4, α_5, α_6) := sum((B[i]*α_1^b_1[i]*α_2^b_2[i]*α_3^b_3[i]*α_4^b_4[i]*α_5^b_5[i]*α_6^b_6[i]), i = 1 .. rows(NU1) - 1)
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# TUNE
# [component: outputs TUNE_x]
# [component: outputs TUNE1_x]
rows(TUNE_x) = 4
cols(TUNE_x) = 8
rows(TUNE1_x) = 4
cols(TUNE1_x) = 8
# [component: outputs TUNE_y]
# [component: outputs TUNE1_y]
rows(TUNE_y) = 4
cols(TUNE_y) = 8
rows(TUNE1_y) = 4
cols(TUNE1_y) = 8
i := 0 .. rows(TUNE_x) - 1
i := 0 .. rows(TUNE1_x) - 1
num_x[i] := TUNE_x[i, 0]
A_x[i] := TUNE_x[i, 1]
ord_x[i] := TUNE_x[i, 2]
num1_x[i] := TUNE1_x[i, 0]
B_x[i] := TUNE1_x[i, 1]
ord1_x[i] := TUNE1_x[i, 2]
b_x1[i] := TUNE1_x[i, 3]
b_x2[i] := TUNE1_x[i, 4]
b_x3[i] := TUNE1_x[i, 5]
a_x1[i] := TUNE_x[i, 3]
a_x2[i] := TUNE_x[i, 4]
a_x3[i] := TUNE_x[i, 5]
b_x4[i] := TUNE1_x[i, 6]
b_x5[i] := TUNE1_x[i, 7]
a_x4[i] := TUNE_x[i, 6]
a_x5[i] := TUNE_x[i, 7]
num_y[i] := TUNE_y[i, 0]
A_y[i] := TUNE_y[i, 1]
ord_y[i] := TUNE_y[i, 2]
num1_y[i] := TUNE1_y[i, 0]
B_y[i] := TUNE1_y[i, 1]
ord1_y[i] := TUNE1_y[i, 2]
b_y1[i] := TUNE1_y[i, 3]
b_y2[i] := TUNE1_y[i, 4]
b_y3[i] := TUNE1_y[i, 5]
a_y1[i] := TUNE_y[i, 3]
a_y2[i] := TUNE_y[i, 4]
a_y3[i] := TUNE_y[i, 5]
b_y4[i] := TUNE1_y[i, 6]
b_y5[i] := TUNE1_y[i, 7]
a_y4[i] := TUNE_y[i, 6]
a_y5[i] := TUNE_y[i, 7]
γ := 1.1279235
ν_x(α_1, α_2, α_3, α_4, α_5) := sum((A_x[i]*α_1^a_x1[i]*α_2^a_x2[i]*α_3^a_x3[i]*α_4^a_x4[i]*α_5^a_x5[i]), i = 1 .. rows(TUNE_x) - 1)
ν_x1(α_1, α_2, α_3, α_4, α_5) := sum((B_x[i]*α_1^b_x1[i]*α_2^b_x2[i]*α_3^b_x3[i]*α_4^b_x4[i]*α_5^b_x5[i]), i = 1 .. rows(TUNE1_x) - 1)
ν_y1(α_1, α_2, α_3, α_4, α_5) := sum((B_y[i]*α_1^b_y1[i]*α_2^b_y2[i]*α_3^b_y3[i]*α_4^b_y4[i]*α_5^b_y5[i]), i = 1 .. rows(TUNE1_x) - 1)
ν_y(α_1, α_2, α_3, α_4, α_5) := sum((A_y[i]*α_1^a_y1[i]*α_2^a_y2[i]*α_3^a_y3[i]*α_4^a_y4[i]*α_5^a_y5[i]), i = 1 .. rows(TUNE_x) - 1)
CHROM_x := A_x[1]*(1 + 1/γ) = 1.87189e-5
CHROM1_x := B_x[1]*(1 + 1/γ) = 3.70027
CHROM_y := A_y[1]*(1 + 1/γ) = -1.94553e-5
CHROM1_y := B_y[1]*(1 + 1/γ) = -15.6955
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