# ORBITAL
# [component: outputs TRPRAY]
j_1 := 4
j_2 := j_1 + 33
k_1 := 2
k_2 := k_1 + 33
l_1 := 3
l_2 := l_1 + 33
rows(TRPRAY) =  # error: Эта переменная не определена.
cols(TRPRAY) =  # error
j := j_1, j_2 .. (3*10^6)/10
k := k_1, k_2 .. (3*10^6)/10
l := l_1, l_2 .. (3*10^6)/10
N_iter := 3*10^6
step := 600
i := 0 .. rows(TRPRAY) - 1
TRP_iter[i] := TRPRAY[i, 0]
TRP_ray[i] := TRPRAY[i, 1]
TRP_X[i] := TRPRAY[i, 2]
TRP_A[i] := TRPRAY[i, 3]
TRP_Y[i] := TRPRAY[i, 4]
TRP_B[i] := TRPRAY[i, 5]
TRP_T[i] := TRPRAY[i, 6]
TRP_D[i] := TRPRAY[i, 7]
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# SPIN
# [component: outputs TRPSPI]
j_1 := 4
j_2 := j_1 + 33
k_1 := 2
k_2 := k_1 + 33
l_1 := 3
l_2 := l_1 + 33
rows(TRPSPI) = 165032
cols(TRPSPI) = 5
i := 0 .. rows(TRPSPI) - 1
j := j_1, j_2 .. 33*5001
k := k_1, k_2 .. 33*5001
l := l_1, l_2 .. 33*5001
SPI_iter[i] := TRPSPI[i, 0]
SPI_ray[i] := TRPSPI[i, 1]
SX[i] := TRPSPI[i, 2]
SY[i] := TRPSPI[i, 3]
SZ[i] := TRPSPI[i, 4]
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N := (3*10^6)/600 = 5000
r := 0, 1 .. N
a := 1
P_y0 := sum(SY[n], n = 32*(a - 1) + (a - 1) .. 32*a + (a - 1))/31 = 0.707107
P_y(a) := sum(SY[n], n = 32*(a - 1) + (a - 1) .. 32*a + (a - 1))/31
P_x(a) := sum(SX[n], n = 32*(a - 1) + (a - 1) .. 32*a + (a - 1))/31
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P_z(a) := sum(SZ[n], n = 32*(a - 1) + (a - 1) .. 32*a + (a - 1))/31
P_y(1) = 0.707107
P_y(5*10^3) - P_y(2) = -1.51613e-7
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