# WIEN FILTER in MADX
# Variables
i := sqrt(-1) = 1i
c_l := 3*10^8  # м/с
# Beam parameters
M := 931.494061  # MeV/u
Z := 1
0.072/0.124 = 0.580645
A := 2
E_si := 100*10^3/10^-2 = 10000000  # V/m
E_kin := 120  # MeV/u
0.124/0.072 = 1.72222
c_si := 3*10^8  # m/с
γ_s := (M + E_kin)/M = 1.12883
β := 0.26784
β_s := sqrt(1 - 1/γ_s^2) = 0.463921
v_si := β*c_si = 80352000  # m/с
B_si := E_si/v_si = 0.124452
V*с/m^2 ≡ T  # error: Здесь необходимо указать имя.
B_si*10^4 = 1244.52  # Gs
B_si1 := E_si/(β_s*c_si) = 0.0718513
B_si/B_si1 = 1.73208
B_si*10^4*10^-3 = 1.24452  # kGs
β_s/β = 1.73208
sqrt(3) = 1.73205
1/sqrt(3) = 0.57735
γ_1 := sqrt(1/(1 - β^2)) = 1.03792
E := (γ_1 - 1)*M = 35.3242
p_0 := M*β_s*γ_s = 487.81  # MeV/u
# Parameters
c(k, L) := cosh(i*k*L)
C(k, L) := cosh(k*L)
c(1, 1) = 0.540302
s(k, L) := sinh(i*k*L)/(i*k)
S(k, L) := sinh(k*L)
s(1, 1) = 0.841471
c(1, 1)^2 + s(1, 1)^2 = 1
d(k, L) := (1 - c(k, L))/k^2
f(k, L) := (1 - s(k, L))/k^2
# Transfer matrix for a Sector Dipole
B_mag := 0.1283  # T
n := 1/2
L := 5.0753794
Bρ := B_mag*L/(2*π) = 0.103637  # T/m
h := 1.6*10^-19/(2*p_0*1.6*10^-19)*B_mag = 0.000131506
K_0 := B_mag/Bρ = 1.23797
h := K_0 = 1.23797
k_x := sqrt((1 - n)*h^2)
k_y := sqrt(n*h^2)  # ??????
c_x := c(k_x, L)
s_x := s(k_x, L)
d_x := h*s(k_x, L)
c_y := c(k_y, L)
s_y := s(k_y, L)
1/(β_s^2*γ_s^2) = 3.64635
J_1 := (L - s_x)/k_x^2
# Drift
R := [
    c_x, s_x, 0, 0, 0, h/β_s*d_x;
    -k_x^2*s_x, c_x, 0, 0, 0, h/β_s*s_x;
    0, 0, c_y, s_y, 0, 0;
    0, 0, -k_y^2*s_y, c_y, 0, 0;
    -1*(h/β_s*s_x), -1*(h/β_s*d_x), 0, 0, 1, L/(β_s^2*γ_s^2) - h^2/(β_s^2*J_1);
    0, 0, 0, 0, 0, 1
] = [
    -0.266255, -1.10113, 0, 0, 0, -3.63761;
    0.84378, -0.266255, 0, 0, 0, -2.93835;
    0, 0, -0.266255, -1.10113, 0, 0;
    0, 0, 0.84378, -0.266255, 0, 0;
    2.93835, 3.63761, 0, 0, 1, 17.6232;
    0, 0, 0, 0, 0, 1
]
|R| = 1
R_1 := [
    1, L, 0, 0, 0, 0;
    0, 1, 0, 0, 0, 0;
    0, 0, 1, L, 0, 0;
    0, 0, 0, 1, 0, 0;
    0, 0, 0, 0, 1, L/(β_s^2*γ_s^2);
    0, 0, 0, 0, 0, 1
] = [
    1, 5.07538, 0, 0, 0, 0;
    0, 1, 0, 0, 0, 0;
    0, 0, 1, 5.07538, 0, 0;
    0, 0, 0, 1, 0, 0;
    0, 0, 0, 0, 1, 18.5066;
    0, 0, 0, 0, 0, 1
]
|R_1| = 1
# Transfer matrix for an Electric Separator
q := 1
L := 5.0753794 = 5.07538  # m
dE_y := (100*10^3/10^-2)*10^-6 = 10  # MV/m
E_y := dE_y*L  # MV
k := q*E_y/p_0 = 0.104044  # MV/(MeV/u)
C := C(k, L) = 1.1427
S := S(k, L) = 0.55295
F := [
    1, L, 0, 0, 0, 0;
    0, 1, 0, 0, 0, 0;
    0, 0, C - k*L/β_s^2*S, 1/k*S, 0, 1/k*(C - 1) - L/β_s^2*S;
    0, 0, k*(S - k*L/β_s^2*C), C, 0, S - k*L/β_s^2*C;
    0, 0, -1*(S - k*L/β_s^2*C), -1/k*(C - 1), 1, -1/k*S + L/β_s^2*C;
    0, 0, 0, 0, 0, 1
] = [
    1, 5.07538, 0, 0, 0, 0;
    0, 1, 0, 0, 0, 0;
    0, 0, -0.214006, 5.31457, 0, -11.6682;
    0, 0, -0.234176, 1.1427, 0, -2.25074;
    0, 0, 2.25074, -1.37149, 1, 21.6325;
    0, 0, 0, 0, 0, 1
]
|F| = 1
# Tilt of s-axis
# A rotation about the s-axis by an angle
ψ := -90  # deg
ψ := ψ/180*π = -1.5708  # rad
Tilt := [
    cos(ψ), 0, sin(ψ), 0, 0, 0;
    0, cos(ψ), 0, sin(ψ), 0, 0;
    -sin(ψ), 0, cos(ψ), 0, 0, 0;
    0, -sin(ψ), 0, cos(ψ), 0, 0;
    0, 0, 0, 0, 1, 0;
    0, 0, 0, 0, 0, 1
] = [
    0, 0, -1, 0, 0, 0;
    0, 0, 0, -1, 0, 0;
    1, 0, 0, 0, 0, 0;
    0, 1, 0, 0, 0, 0;
    0, 0, 0, 0, 1, 0;
    0, 0, 0, 0, 0, 1
]
Tilt^-1 = [
    0, 0, 1, 0, 0, 0;
    0, 0, 0, 1, 0, 0;
    -1, 0, 0, 0, 0, 0;
    0, -1, 0, 0, 0, 0;
    0, 0, 0, 0, 1, 0;
    0, 0, 0, 0, 0, 1
]
|Tilt| = 1
|Tilt^-1| = 1
F_1 := Tilt*F*Tilt^-1 = [
    -0.214006, 5.31457, 0, 0, 0, 11.6682;
    -0.234176, 1.1427, 0, 0, 0, 2.25074;
    0, 0, 1, 5.07538, 0, 0;
    0, 0, 0, 1, 0, 0;
    -2.25074, 1.37149, 0, 0, 1, 21.6325;
    0, 0, 0, 0, 0, 1
]
|F_1| = 1
# WIEN FILTER in OptiM
B := 0.0001  # kG
m_0 := □  # error: Пустой местозаполнитель.
E_0 := 0.0001  # kV/cm
r_B := p_0/B = 4878100
ρ_B := 1/r_B = 2.04998e-7
r_E := β_s*p_0/E_0 = 2263052
ρ_E := 1/r_E = 4.41881e-7
R_0 := 1/(1/ρ_B + 1/ρ_E) = 1.40033e-7
G_E := -1*E_0/R_0 = -714.115
G_B := B/R_0 = 714.115
G := G_B + 1/β*G_E = -1952.09
k_x := sqrt(1/R_0^2 + (E_0*R_0/(β_s^2*γ_s^2))^2 + G/p_0) = 7141152
k_y := sqrt(-G/p_0) = 2.00043
k_p := 1 + (E_0*R_0/(β_s^2*γ_s^3))^2 = 1
W := [
    cos(k_x*L), 1/k_x*sin(k_x*L), 0, 0, 0, k_p/k_x*(1 - cos(k_x*L));
    -k_x*sin(k_x*L), cos(k_x*L), 0, 0, 0, k_p/k_x*sin(k_x*L);
    0, 0, cos(k_y*L), 1/k_y*sin(k_y*L), 0, 0;
    0, 0, -k_y*sin(k_y*L), cos(k_y*L), 0, 0;
    -(k_p/k_x)*sin(k_x*L), -(k_p/k_x)*(1 - cos(k_x*L)), 0, 0, 1, L/γ_s^2 - L*k_p^2/k_x^2*(1 - sin(k_x*L))/(L*k_x);
    0, 0, 0, 0, 0, 1
] = [
    -0.968233, 3.50154e-8, 0, 0, 0, 2.75618e-7;
    -1785645, -0.968233, 0, 0, 0, 3.50154e-8;
    0, 0, -0.746387, -0.332684, 0, 0;
    0, 0, 1.33131, -0.746387, 0, 0;
    -3.50154e-8, -2.75618e-7, 0, 0, 1, 3.98304;
    0, 0, 0, 0, 0, 1
]
