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γ_s := 1.12792344429
α_0 := 0.02
α_0/γ_s^2 + 1/γ_s^4 = 0.633568
δ_m := 10^-4
L := 503.04*10^3  # mm
1/L = 1.98791e-6
ε_x := 3  # mm mrad
ε_y := 3  # mm mrad
α_1_beta := -0.017
α_1_spin := 0.03
ξ_x_beta := 0.63
ξ_x_spin := -7
ξ_y_beta := -0.009
ξ_y_spin := -14
ν_x_beta := 9.8 + ξ_x_beta*δ_m = 9.80006
ν_x_spin := 9.8 + ξ_x_spin*δ_m = 9.7993
ν_y_beta := 10.8 + ξ_y_beta*δ_m = 10.8
ν_y_spin := 10.8 + ξ_y_spin*δ_m = 10.7986
Δδ_eq(α_1, ν_x, ν_y) := γ_s^2/((γ_s^2*α_0) - 1)*((α_1 - α_0/γ_s^2 + 1/γ_s^4)*δ_m^2/2 + π/(2*L)*(ε_x*ν_x + ε_y*ν_y))
ΔC(α_1, ξ_x, ξ_y) := -π*(ε_x*ξ_x + ε_y*ξ_y) + δ_m*(α_0 + α_1*δ_m)
Δδ_eq(α_1_beta, ν_x_beta, ν_y_beta) = -0.000251922  # beta chrom
ΔC(α_1_beta, ξ_x_beta, ξ_y_beta) = -5.85279
Δδ_eq(α_1_spin, ν_x_spin, ν_y_spin) = -0.000251896  # spin chrom
ΔC(α_1_spin, ξ_x_spin, ξ_y_spin) = 197.92
